*Heading
** Job name: Surface3200 Model name: Cohesive_surface
** Generated by: Abaqus/CAE 2017
*Preprint, echo=NO, model=NO, history=NO, contact=NO
**
** PARTS
**
*Part, name=Lamina
*Node
      1,  0.100000001,           0.
      2,  0.100000001, 0.000375000003
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*Element, type=CPE4I
   1,    1,    2,    7,    6
   2,    2,    3,    8,    7
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*Nset, nset=Set-1, generate
    1,  2005,     1
*Elset, elset=Set-1, generate
    1,  1600,     1
*Orientation, name=Ori-1
1., 0., 0., 0., 1., 0.
3, 0.
** Section: lamina
*Solid Section, elset=Set-1, orientation=Ori-1, material=Composite
0.02,
*End Part
**
**
** ASSEMBLY
**
*Assembly, name=Assembly
**
*Instance, name=Lamina-1, part=Lamina
*End Instance
**
*Instance, name=Lamina-2, part=Lamina
          0.,      -0.0015,           0.
*End Instance
**
*Nset, nset=Fixed, instance=Lamina-1, generate
 1,  5,  1
*Nset, nset=Fixed, instance=Lamina-2, generate
 1,  5,  1
*Elset, elset=Fixed, instance=Lamina-1, generate
 1,  4,  1
*Elset, elset=Fixed, instance=Lamina-2, generate
 1,  4,  1
*Nset, nset=bond, instance=Lamina-1, generate
    1,  1401,     5
*Elset, elset=bond, instance=Lamina-1, generate
    1,  1117,     4
*Nset, nset=bot, instance=Lamina-2
 2001,
*Nset, nset=top, instance=Lamina-1
 2005,
*Elset, elset=_bot_S2, internal, instance=Lamina-2, generate
    4,  1600,     4
*Surface, type=ELEMENT, name=bot
_bot_S2, S2
*Elset, elset=_top_S4, internal, instance=Lamina-1, generate
    1,  1597,     4
*Surface, type=ELEMENT, name=top
_top_S4, S4
*End Assembly
**
** MATERIALS
**
*Material, name=Composite
*Elastic, type=ENGINEERING CONSTANTS
 1.227e+11, 1.01e+10, 1.01e+10,     0.25,     0.25,     0.45,  5.5e+09,  5.5e+09
  3.7e+09,
**
** INTERACTION PROPERTIES
**
*Surface Interaction, name=Cohesive
0.02,
*Friction
0.,
*Surface Behavior, pressure-overclosure=HARD
*Cohesive Behavior, eligibility=SPECIFIED CONTACTS
 8e+14, 8e+14, 8e+14
*Damage Initiation, criterion=QUADS
 8e+07, 8e+07, 8e+07
*Damage Evolution, type=ENERGY, mixed mode behavior=BK, power=2.284
969.,969.,969.
*Damage Stabilization
1e-05
**
** INTERACTIONS
**
** Interaction: Int-1
*Contact Pair, interaction=Cohesive
top, bot
*Initial Conditions, type=CONTACT
top, bot, bond
** ----------------------------------------------------------------
**
** STEP: Step-1
**
*Step, name=Step-1, nlgeom=YES, inc=5000
*Static
0.0001, 1., 1e-16, 0.1
**
** BOUNDARY CONDITIONS
**
** Name: BC-1 Type: Displacement/Rotation
*Boundary
top, 1, 1
top, 2, 2, 0.008
** Name: BC-2 Type: Displacement/Rotation
*Boundary
bot, 1, 1
bot, 2, 2, -0.008
**
** CONTROLS
**
*Controls, reset
*Controls, parameters=time incrementation
, , , , , , , 15, , ,
**
** OUTPUT REQUESTS
**
*Restart, write, frequency=0
**
** FIELD OUTPUT: F-Output-1
**
*Output, field
*Node Output
CF, RF, U
*Element Output, directions=YES
LE, PE, PEEQ, PEMAG, S, STATUS
*Contact Output
CDISP, CSTRESS
**
** HISTORY OUTPUT: H-Output-2
**
*Output, history
*Node Output, nset=top
RF2, U2
**
** HISTORY OUTPUT: H-Output-1
**
*Output, history, variable=PRESELECT
*End Step
